# Практическая работа
# по теме: "Определение h-параметров схемы с общим эмиттером граф-аналитическим способом"
# Вариант №8
# Биполярный транзистор - КТ201
# Униполярный транзистор - КП307
# 1. По входным характеристикам транзистора включенным по схеме с ОЭ определить h11э, h12э в рабочей точке с Uбэ = 0,8В, Uкэ=5В
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h_11э == ΔU_бэ/ΔI_бэ
# при
U_кэ == 5*В
h_11э := 0.15/(0.07*10^-3)
h_11э = 2142.86  # Ом
h_12э == ΔU_бэ/ΔU_кэ
# при
I_б == 0.2*мА
h_12э := 0.65/5 = 0.13  # В
# 2. Пользуясь выходной характеристикой транзистора определить h21э, h22э в рабочей точке с Uкэ=5В и Iб=0,15мА
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h_21э == ΔI_к/ΔI_б
# при
U_кэ == 5*В
h_21э := (30 - 15)*10^-3/((0.2 - 0.1)*10^-3) = 150  # Ом
h_22э == ΔI_к/ΔU_кэ
# при
I_б == 0.15*мА
h_22э := 2*10^-3/4 = 0.0005
R := 1/h_22э = 2000  # Ом
# 3. Полевой транзистор с управляемым p-n переходом имеет ВАХ (рис. ниже), определить тип канала и основные характеристики
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# Канал n-типа
I_ис.насыщения == 11  # мА
U_з.ист.отсечки == -1.75  # В
S == ΔI_c/ΔU_зи
# при
U_cи == 10  # В
S := (7 - 3.6)*10^-3/0.5 = 0.0068  # А/В
S - крутизна
# Дифференциальное сопротивление канала на участках насыщения
r_c == ΔU_си/ΔI_с
# при
U_зи == const
r_c := 5/(0.1*10^-3) = 50000  # Ом
# 4. Определить все физические параметры схемы, если h11б = 23Ом, h12б = 2*10^-4 , h21б = 0,98 , h22б = 1 мкСм
α := h_21б == 0.98  # error: Эта переменная не определена. Проверьте правильность установки обозначения.
r_б == h_12б/h_22б
r_b := 2*10^-4/(1*10^-6) = 200  # Ом
r_э == h_11б - h_12б*(1 - h_21б)/h_22б
r_э := 25 - 2*10^-4*(1 - 0.98)/(1*10^-6) = 21  # Ом
r_k == 1/h_22б
r_k := 1*10^6  # Ом
